// SBML level 2 version 4

model splitEnzymeKinietics1()
  // splitEnzymeKinietics1

  // Compartments:
  compartment compartment_1 = 1;

  // Species:
  species tysl in compartment_1 = 1;
  species tase1 in compartment_1 = 1;
  species tase2 in compartment_1 = 1;
  species TT in compartment_1 = 0;
  species TTT in compartment_1 = 0;
  species TTTHRP in compartment_1 = 0;
  species TMB in compartment_1 = 1;
  species blueComp in compartment_1 = 0;

  // Parameters:
  k_cat = 1;

  // Reactions:
  reaction_1: tysl + tase1 -> TT; reaction_1_kf*tysl*tase1 - reaction_1_kr*TT;
    reaction_1_kf = 1; reaction_1_kr = 1;
  reaction_2: TT + tase2 -> TTT; reaction_2_kf*TT*tase2 - reaction_2_kr*TTT;
    reaction_2_kf = 1; reaction_2_kr = 1;
  reaction_3: TTT -> TTTHRP; reaction_3_kf*TTT - reaction_3_kr*TTTHRP;
    reaction_3_kf = 1; reaction_3_kr = 1;
  reaction_4: TMB => blueComp; TTTHRP*k_cat*TMB/(km + TMB);
    km = 1;
end
